table  # each column defines a variable
    E_1 (V) | E_3 (V) | R_1 (kΩ) | R_2 (kΩ) | R_3 (kΩ) | R_4 (kΩ) | R_5 (kΩ) | R_6 (kΩ)
    15 | 30 | 3.9 | 0.82 | 2.4 | 4.7 | 1.5 | 1.2
end table
# PS
# если вам лень считать эксперементально или вы рукапоп, то можете подогнать значения +- с этими, не прогадаете
# only  E_3 | only  E_1
R_15 := (R_1*R_5)/(R_1 + R_5) = 1.08333 kΩ
R_34 := (R_3*R_4)/(R_3 + R_4) = 1.58873 kΩ
R_1256 := R_2 + R_15 + R_6 = 3.10333 kΩ
R_2346 := R_2 + R_34 + R_6 = 3.60873 kΩ
R_12456 := (R_1256*R_4)/(R_1256 + R_4) = 1.86916 kΩ
R_23456 := (R_2346*R_5)/(R_2346 + R_5) = 1.05958 kΩ
R_э := R_12456 + R_3 = 4.26916 kΩ
R_э2 := R_1 + R_23456 = 4.95958 kΩ
i_1 := E_1/R_э2 = 3.02445 mA
I_3 := E_3/R_э = 7.02715 mA
i_5 := i_1*R_2346/(R_2346 + R_5) = 2.13643 mA
I_4 := I_3*R_1256/(R_4 + R_1256) = 2.79465 mA
i_6 := i_1 - i_5 = 0.888024 mA
i_2 := i_6 = 0.000888024 A
I_6 := I_3 - I_4 = 4.2325 mA
I_2 := I_6
i_4 := i_2*R_3/(R_3 + R_4) = 0.300177 mA
I_5 := I_2*R_1/(R_1 + R_5) = 3.0568 mA
i_3 := i_2 - i_4 = 0.587847 mA
I_1 := I_2 - I_5 = 1.17569 mA
# Потанцевал обхода сами выбираете
# он должен указываться в варике
И_1 := i_1 - I_1 = 1.84876 mA
И_2 := i_2 - I_2 = -3.34447 mA
φ_а := 0
И_3 := i_3 - I_3 = -6.4393 mA
И_4 := i_4 + I_4 = 3.09483 mA
φ_б := -И_2*R_2 = 2.74247 V
И_5 := i_5 + I_5 = 5.19323 mA
И_6 := i_6 - I_6 = -3.34447 mA
φ_в := φ_б - И_3*R_3 = 18.1968 V
φ_г := φ_в - E_3 = -11.8032 V
φ_д := φ_г - И_6*R_6 = -7.78985 V
φ_е := φ_д + E_1 = 7.21015 V
И_1*R_1 = 7.21015 V
f := (φ_е - И_1*R_1) = 5.32907e-15 V  # конечный потанцевал типо 0 => всё ок
