E := 10
R1 := 580
R2 := 5800
R3 := 3000
R4 := 15
C1 := 0.5*10^-6
C2 := 5*10^-6
C3 := 0.22*10^-6
RK := 68
L := 0.25
I3UST := E/(R3 + RK)
UCUST := I3UST*RK
K1 := C3*L*(R4 + R3)
K2 := L + C3*(R4*R3 + R4*RK + R3*RK)
K3 := R3 + RK
K1*x^2 + K2*x + K3
v := [K3; K2; K1]
polyroots(v) =  # no stored result
