E_2 := 30
φ_2 := 0
R_1 := 2400 Ω
R_4 := 1000 Ω
E_4 := 15
R_2 := 2400 Ω
R_5 := 3900 Ω  # var №1
R_3 := 2000 Ω
R_6 := 2400 Ω
g_13 := -1/R_3 = -0.0005 S
g_11 := 1/R_1 + 1/R_2 + 1/R_3 = 1.33333 1/kΩ
g_14 := -1/R_2 = -0.000416667 S
g_33 := 1/R_5 + 1/R_4 + 1/R_3 = 1.75641 1/kΩ
g_34 := -1/R_4
g_44 := 1/R_2 + 1/R_4 + 1/R_6 = 1.83333 1/kΩ
I_11 := E_2/R_2 = 0.0125 S
g_31 := g_13
I_44 := -E_2/R_2 - E_4/R_4 = -0.0275 S
g_41 := g_14
g_43 := g_34
I_33 := E_4/R_4 = 0.015 S
solve block
    # guess values
    φ_1 := 1
    φ_3 := 1
    φ_4 := 1
    # constraints
    φ_1*g_11 + φ_3*g_13 + φ_4*g_14 == I_11
    φ_3*g_33 + φ_1*g_31 + φ_4*g_34 == I_33
    φ_4*g_44 + φ_3*g_43 + φ_1*g_41 == I_44
    # solver
    [φ_1; φ_3; φ_4] := Find(φ_1, φ_3, φ_4) = [7.79445; 4.68117; -10.6752]
end solve block
I_1 := (φ_1 - φ_2)/R_1
I_4 := (φ_4 - φ_3 + E_4)/R_4
I_2 := (φ_1 - φ_4 - E_2)/R_2
I_5 := (φ_3 - φ_2)/R_5 = 1.2003 mA/V
I_3 := (φ_3 - φ_1)/R_3
I_6 := (φ_2 - φ_4)/R_6 = 4.44799 mV*s^6*A^3/(kg^2*m^4)
P_пр := I_1^2*R_1 + I_2^2*R_2 + I_3^2*R_3 + I_4^2*R_4 + I_5^2*R_5 + I_6^2*R_6 = 0.138785 S
P_ист := I_4*E_4 - I_2*E_2 = 0.138785 s^3*A^2/(kg*m^2)
U_14 := (E_4/(R_4 + R_3) + E_2/R_2)/(1/(R_4 + R_3) + 1/R_2 + 1/(R_6 + R_1)) = 18.2609
I'_4 := (-U_14 + E_4)/(R_4 + R_3)
I'_1 := U_14/(R_1 + R_6) = 0.00380435 S
I'_3 := (E_2 - U_14)/(R_1 + R_6) = 2.44565 mV*s^6*A^3/(kg^2*m^4)
R_16 := R_1*R_6/(R_1 + R_2 + R_6)
R_12 := R_1*R_2/(R_2 + R_1 + R_6)
I'_1 + I'_4 = 0.00271739 S
R_26 := R_2*R_6/(R_2 + R_1 + R_6)
U_24 := I'_1*R_6 = 9.13043
U_43 := I'_4*R_4 - E_4 = -16.087
U_xx := U_24 + U_43 = -6.95652
R_вн := R_16 + (R_26 + R_4)*(R_12 + R_3)/(R_26 + R_4 + R_12 + R_3)
I_н := U_xx/(R_вн + R_5) = -1.2003 1/kΩ
I_кз := U_xx/R_вн = -3.66972 mA/V
φ_4 := 0
φ_5 := φ_4 - I_2*R_2 = 11.5304
φ_1 := φ_5 + E_2 = 41.5304
φ_2 := φ_1 - I_1*R_1 = 33.7359
φ_3 := φ_2 - I_5*R_5 = 29.0548
φ_6 := φ_3 - E_4 = 14.0548
φ_k := φ_6 - I_4*R_4 = 14.4111
