E_2 := 30
φ_1 := 0
R_1 := 2000 Ω
R_4 := 1000 Ω
E_4 := 15
R_2 := 3900 Ω
R_5 := 3900 Ω  # var №2
R_3 := 620 Ω
R_6 := 2400 Ω
g_23 := -1/R_5 = -0.00025641 S
g_22 := 1/R_1 + 1/R_5 + 1/R_6 = 1.17308 1/kΩ
g_24 := -1/R_6 = -0.000416667 S
g_33 := 1/R_5 + 1/R_4 + 1/R_3 = 2.86931 1/kΩ
g_34 := -1/R_4
g_44 := 1/R_2 + 1/R_4 + 1/R_6 = 1.67308 1/kΩ
I_22 := 0
g_32 := g_23
I_44 := -E_2/R_2 - E_4/R_4
g_42 := g_24
g_43 := g_34
I_33 := E_4/R_4
solve block
    # guess values
    φ_2 := 1
    φ_3 := 1
    φ_4 := 1
    # constraints
    φ_2*g_22 + φ_3*g_23 + φ_4*g_24 == I_22
    φ_3*g_33 + φ_3*g_32 + φ_4*g_34 == I_33
    φ_4*g_44 + φ_3*g_43 + φ_2*g_42 == I_44
    # solver
    [φ_2; φ_3; φ_4] := Find(φ_2, φ_3, φ_4) = [-5.255; 0.0635496; -14.834]
end solve block
I_1 := (φ_1 - φ_2)/R_1
I_4 := (φ_4 - φ_3 + E_4)/R_4 = 0.102499 mA/V
I_2 := (φ_1 - φ_4 - E_2)/R_2
I_5 := (φ_3 - φ_2)/R_5
I_3 := (φ_3 - φ_1)/R_3
I_6 := (φ_2 - φ_4)/R_6
P_пр := I_1^2*R_1 + I_2^2*R_2 + I_3^2*R_3 + I_4^2*R_4 + I_5^2*R_5 + I_6^2*R_6 = 0.118286 S
P_ист := I_4*E_4 - I_2*E_2 = 0.118199 s^3*A^2/(kg*m^2)
U_34 := (E_4/R_4 + E_2/(R_2 + R_3))/(1/(R_2 + R_3) + 1/R_4 + 1/(R_6 + R_5)) = 15.6795
I'_1 := (U_34 - E_2)/(R_2 + R_3) = -3.16826 1/kΩ
I'_2 := U_34/(R_5 + R_6) = 2.4888 1/kΩ
I'_3 := (E_4 - U_34)/R_4 = -0.679458 1/kΩ
R_23 := R_2*R_3/(R_2 + R_3 + R_4)
R_24 := R_2*R_4/(R_2 + R_3 + R_4)
I'_1 + I'_2 = -0.000679458 S
R_34 := R_3*R_4/(R_2 + R_3 + R_4)
U_24 := -I'_2*R_6
U_14 := I'_1*R_2
U_xx := U_14 + U_24 + E_2 = 11.6707
R_вн := R_23 + (R_24 + R_6)*(R_34 + R_5)/(R_24 + R_6 + R_34 + R_5)
I_н := U_xx/(R_вн + R_1) = 2.78606 1/kΩ
I_н - I_1 = 0.000158564 S
I_кз := U_xx/R_вн = 5.33165 mA/V
φ_1 := 0
φ_2 := φ_1 - I_1*R_1 = -5.255
φ_4 := φ_2 - I_6*R_6 = -14.834
φ_6 := φ_4 - I_4*R_4 = -14.9365
φ_3 := φ_6 + E_4 = 0.0635496
φ_0 := φ_3 - I_3*R_3 = -2.498e-16
