E2 := 15
R1 := 2400
F1 := -6
E4 := 30
R2 := 1000
F2 := -10
R3 := 2400
F4 := -21
R4 := 1500
R5 := 3900
R6 := 2400
G11 := 1/R1 + 1/R2 + 1/R3
U14 := -(E4/(R3 + R4) + E2/R2)/(1/(R3 + R4) + 1/R2 + 1/(R1 + R6))
G22 := 1/R1 + 1/R6 + 1/R5
I6 := (-U14 - E2)/(R1 + R6)
G44 := 1/R2 + 1/R6 + 1/R4
I2 := U14/R2
solve block
    ((F2 - F1)/R1 + (F4 - F1 + E2)/R2 - F1/R3) == 0
    (-F2/R5 - (F2 - F1)/R1 - (F2 - F4)/R6) == 0
    ((F2 - F4)/R6 - (F4 - F1 + E2)/R2 - (F4 + E4)/R4) == 0
    [A1; A2; A4] := Find(F1, F2, F4)
end solve block
G12 := -1/R1
I4 := I6 - I2
A1 =  # no stored result
X1 := R3*R2/(R2 + R3 + R4)
G14 := -1/R2
A2 =  # no stored result
X3 := R3*R4/(R2 + R3 + R4)
G24 := -1/R6
A4 =  # no stored result
X4 := R2*R4/(R2 + R3 + R4)
I11 := E2/R2
I13 := A1/R3
R0 := X4 + (X3 + R5)*(X1 + R1)/(X3 + R5 + X1 + R1)
I21 := (A2 - A1)/R1
I22 := 0
I24 := (A2 - A4)/R6
G11N := 1/R3 + 1/(R1 + R5) + 1/(R2 + R4)
I44 := -E2/R2 + (-E4/R4)
I41 := (A4 - A1)/R2
I43 := (A4 + E4)/R4
I11N := (E2 - E4)/(R2 + R4)
I32 := -A2/R5
U13N := I11N/G11N
I3N := U13N/R3
I1N := U13N/(R1 + R5)
I2N := I1N + I3N
U24N := I1N*R6
U14N := I2N*R2 - E2
U12N := I1N*R1
U21N := I1N*R1
solve block
    F1*G11 + F2*G12 + F4*G14 == I11
    F2*G22 + F1*G12 + F4*G24 == I22
    F4*G44 + F1*G14 + F2*G24 == I44
    [B1; B2; B4] := Find(F1, F2, F4)
end solve block
U0 := U14N + U12N
B1 =  # no stored result
I23 := U0/(R0 + R6)
B2 =  # no stored result
IKZ := U0/R0
B4 =  # no stored result
I32 =  # no stored result
C1 := 1
C2 := 2
C3 := 3
solve block
    E4 - E2 == C1*(R2 + R4 + R3) - C2*R2 - C3*R4
    E2 == C2*(R1 + R2 + R6) - C1*R2 - C3*R6
    -E4 == C3*(R4 + R5 + R6) - C1*R4 - C2*R6
    [C11; C22; C33] := Find(C1, C2, C3)
end solve block
C11 =  # no stored result
C22 =  # no stored result
C33 =  # no stored result
CR2 := C11 - C22
CR4 := C33 - C11
CR6 := C33 - C22
