# Метод контурных токов
ORIGIN := 1
R := [530; 370; 930; 590; 780; 260]
E := [0; 0; 800; 900; 0; 0]
J := [0; 0; 0; 5; 7; 0]
RD := diag(R)
G := 1/RD
RD = [
    530, 0, 0, 0, 0, 0;
    0, 370, 0, 0, 0, 0;
    0, 0, 930, 0, 0, 0;
    0, 0, 0, 590, 0, 0;
    0, 0, 0, 0, 780, 0;
    0, 0, 0, 0, 0, 260
]
A := [1, 1, 0, 0, 0, -1; 0, -1, 1, 0, 1, 0; -1, 0, 0, 0, -1, 0; 0, 0, 0, -1, 0, 1]
B := [-1, 1, 0, 0, 1, 0; 0, 1, 1, 1, 0, 1; 0, 0, 0, 0, -1, 0; 0, 0, 0, -1, 0, 0]
IK := (B*RD*transpose(B))^-1*(B*E + B*RD*J)
IK = [-0.233604; 0.568227; -7.2336; -5.9572]
I := transpose(B)*IK
transpose(I) = [0.233604, 0.334622, 0.568227, 6.52542, 7, 0.568227]
IR := I - J
transpose(IR) = [0.233604, 0.334622, 0.568227, 1.52542, 0, 0.568227]
