# Метод законов Кирхгофа
ORIGIN := 1
R1 := 530
R2 := 370
R3 := 930
R4 := 590
R5 := 560
R6 := 750
R7 := 780
R8 := 260
E3 := 800
E4 := 900
J4 := 5
J7 := 7
A := [
    -1, -1, 0, 0, 0, 0, 0, 1;
    0, 1, -1, 0, 0, 0, -1, 0;
    1, 0, 0, 0, 0, -1, 1, 0;
    0, 0, 0, 1, 1, 0, 0, -1;
    0, 0, 1, -1, 0, 0, 0, 0;
    0, -R2, -R3, -R4, 0, 0, 0, -R8;
    0, 0, R3, R4, -R5, -R6, -R7, 0;
    -R1, R2, 0, 0, 0, 0, R7, 0
]
B := [0; J7; -J7; -J4; J4; -E3 - E4; E3 + E4; 0]
A = [
    -1, -1, 0, 0, 0, 0, 0, 1;
    0, 1, -1, 0, 0, 0, -1, 0;
    1, 0, 0, 0, 0, -1, 1, 0;
    0, 0, 0, 1, 1, 0, 0, -1;
    0, 0, 1, -1, 0, 0, 0, 0;
    0, -370, -930, -590, 0, 0, 0, -260;
    0, 0, 930, 590, -560, -750, -780, 0;
    -530, 370, 0, 0, 0, 0, 780, 0
]
B = [0; 7; -7; -5; 5; -1700; 1700; 0]
X := A^-1*B
transpose(X) = [-2.50455, 4.65145, 1.55972, -3.44028, 0.587187, 0.587187, -3.90827, 2.1469]
