# Метод контурных токов
ORIGIN := 1
R := [530; 370; 930; 590; 560; 750; 780; 260]
E := [0; 0; 800; 900; 0; 0; 0; 0]
J := [0; 0; 0; 5; 0; 0; 7; 0]
RD := diag(R)
G := 1/RD
RD = [
    530, 0, 0, 0, 0, 0, 0, 0;
    0, 370, 0, 0, 0, 0, 0, 0;
    0, 0, 930, 0, 0, 0, 0, 0;
    0, 0, 0, 590, 0, 0, 0, 0;
    0, 0, 0, 0, 560, 0, 0, 0;
    0, 0, 0, 0, 0, 750, 0, 0;
    0, 0, 0, 0, 0, 0, 780, 0;
    0, 0, 0, 0, 0, 0, 0, 260
]
A := [
    1, 1, 0, 0, 0, 0, 0, -1;
    0, -1, 1, 0, 0, 0, 1, 0;
    -1, 0, 0, 0, 0, 1, -1, 0;
    0, 0, 0, -1, -1, 0, 0, 1;
    0, 0, -1, 1, 0, 0, 0, 0
]
B := [0, -1, -1, -1, 0, 0, 0, -1; 0, 0, 1, 1, -1, -1, -1, 0; -1, 1, 0, 0, 0, 0, 1, 0]
IK := (B*RD*transpose(B))^-1*(B*E + B*RD*J)
IK = [-2.1469; -0.587187; 2.50455]
I := transpose(B)*IK
transpose(I) = [-2.50455, 4.65145, 1.55972, 1.55972, 0.587187, 0.587187, 3.09173, 2.1469]
IR := I - J
transpose(IR) = [-2.50455, 4.65145, 1.55972, -3.44028, 0.587187, 0.587187, -3.90827, 2.1469]
