# Метод узловых потенциалов
ORIGIN := 1
R := [530; 370; 930; 590; 560; 750; 780; 260]
E := [0; 0; 800; 900; 0; 0; 0; 0]
J := [0; 0; 0; 5; 0; 0; 7; 0]
RD := diag(R)
G := 1/RD
RD = [
    530, 0, 0, 0, 0, 0, 0, 0;
    0, 370, 0, 0, 0, 0, 0, 0;
    0, 0, 930, 0, 0, 0, 0, 0;
    0, 0, 0, 590, 0, 0, 0, 0;
    0, 0, 0, 0, 560, 0, 0, 0;
    0, 0, 0, 0, 0, 750, 0, 0;
    0, 0, 0, 0, 0, 0, 780, 0;
    0, 0, 0, 0, 0, 0, 0, 260
]
A := [
    1, 1, 0, 0, 0, 0, 0, -1;
    0, -1, 1, 0, 0, 0, 1, 0;
    -1, 0, 0, 0, 0, 1, -1, 0;
    0, 0, 0, -1, -1, 0, 0, 1;
    0, 0, -1, 1, 0, 0, 0, 0
]
B := [0, -1, -1, -1, 0, 0, 0, -1; 0, 0, 1, 1, -1, -1, -1, 0; -1, 1, 0, 0, 0, 0, 1, 0]
Ф := (A*G*transpose(A))^-1*(-A*G*E - A*J)
Ф = [-887.02; -2608.06; 440.39; -328.825; -3258.59]
U := transpose(A)*Ф
transpose(U) = [-1327.41, 1721.04, 650.536, -2929.77, 328.825, 440.39, -3048.45, 558.195]
IR := G*(U + E)
transpose(IR) = [-2.50455, 4.65145, 1.55972, -3.44028, 0.587187, 0.587187, -3.90827, 2.1469]
