R1 := 530
E3 := 800
J4 := 5
R2 := 370
E4 := 900
J7 := 7
R3 := 930
R4 := 590
R5 := 560
R6 := 750
R7 := 780
R8 := 260
E04 := 3850
R17 := (R1*R7)/(R1 + R2 + R7)
R17 = 246.071
R12 := (R1*R2)/(R1 + R2 + R7)
R12 = 116.726
R27 := (R2*R7)/(R1 + R2 + R7)
R27 = 171.786
E17 := J7*R17
E17 = 1722.5
E27 := J7*R27
E27 = 1202.5
E34 := E3 + E4 + (J4*R4)
E34 = 4650
R56 := R5 + R6
R34 := R3 + R4
R2347 := R27 + R34
R1567 := R56 + R17
E04 = 3850
E2347 := E34 - E27
R128 := R12 + R8
E34 = 4650
E17 = 1722.5
R1567 = 1556.07
E2347 = 3447.5
R2347 = 1691.79
R04 := (1/R128 + 1/R2347 + 1/R1567)
R04 = 0.00388818
U04 := (-E17/R1567 - E2347/R2347)/R04
U04 = -808.795
I128 := -U04/R128 = 2.1469
I2347 := (E2347 + U04)/R2347 = 1.55972
I1567 := (E17 + U04)/R1567 = 0.587187
U13 := I128*R12 + I1567*R17 - E17 = -1327.41
U12 := I128*R12 + R27*I2347 + E27 = 1721.04
U23 := U13 - U12 = -3048.45
U23 := U12 - U13 = 3048.45
I7 := J7 - ((U23 + (J7*R7))/R7) = -3.90827
I1 := U13/R1 = -2.50455
I2 := U12/R2 = 4.65145
I3 := I2 - I7 - J7 = 1.55972
I4 := I3 - J4 = -3.44028
I8 := I1 + I2 = 2.1469
I6 := I7 + I1 + J7 = 0.587187
I5 := I6
U61 := I5*R5 + I8*R8 = 887.02
U16 := -I6*R6 - I1*R1 = 887.02
E7 := 5460
E4*I4 = -3096.26
E3*I3 = 1247.77
J7*U23 = 21339.1
U45 := E4 - R4*I4 = 2929.77
J4*U45 = 14648.8
Pist := J4*U45 + J7*U23 + E3*I3 + E4*I4 = 34139.5
Prr := I1^2*R1 + I2^2*R2 + I3^2*R3 + I4^2*R4 + I5^2*R5 + I6^2*R6 + I7^2*R7 + I8^2*R8 = 34139.5
R2 + R3 + R4 + R8 = 2150
J44 := 5
J33 := 7
J44*R4 = 2950
E3 + E4 + 2950 = 4650
J33*R7 = 5460
J11 := 2.883
J22 := 1.667
U64 := -E3 - E4 - ((J11 - J33)*R7) + J22*R3 + ((J22 - J44)*R4) = 1095.1
R2834 := R2 + R8 + R34 = 2150
R28 := R2*R8/R2834 = 44.7442
R348 := R34*R8/R2834 = 183.814
R234 := R2*R34/R2834 = 261.581
Rr := ((R234 + R7)*(R28 + R1))/(R234 + R7 + R28 + R1) + R348 = 554.187
I55 := U64/(Rr + R5 + R6) = 0.587441
a4 := -I2*R2 - I8*R8 = -2279.23
a5 := a4 + E4 - I4*R4 = 650.536
a2 := a5 + E3 - I3*R3 = 9.09495e-13
a
