# Метод законов Кирхгофа
ORIGIN := 1
R1 := 760
R2 := 910
R3 := 970
R4 := 590
R5 := 250
R6 := 560
R7 := 450
R8 := 230
E3 := 200
E1 := 900
J2 := 6
J3 := 4
A := [
    0, 1, -1, 0, 0, 0, -1, 0;
    1, -1, 0, 0, 0, 0, 0, -1;
    -1, 0, 0, 0, 0, 1, 1, 0;
    0, 0, 1, -1, 0, 0, 0, 0;
    0, 0, 0, 1, -1, 0, 0, 1;
    0, R2, R3, R4, 0, 0, 0, -R8;
    R1, R2, 0, 0, 0, 0, R7, 0;
    0, 0, R3, R4, R5 + R6, 0, -R7, 0
]
B := [J3 - J2; J2; 0; -J3; 0; E3; E1; E3]
A = [
    0, 1, -1, 0, 0, 0, -1, 0;
    1, -1, 0, 0, 0, 0, 0, -1;
    -1, 0, 0, 0, 0, 1, 1, 0;
    0, 0, 1, -1, 0, 0, 0, 0;
    0, 0, 0, 1, -1, 0, 0, 1;
    0, 910, 970, 590, 0, 0, 0, -230;
    760, 910, 0, 0, 0, 0, 450, 0;
    0, 0, 970, 590, 810, 0, -450, 0
]
B = [-2; 6; 0; -4; 0; 200; 900; 200]
X := A^-1*B
transpose(X) = [1.83471, -1.35821, -1.00619, 2.99381, 0.186728, 0.186728, 1.64798, -2.80708]
