R_8 := 230
J_02 := 6
R_7 := 450
J_03 := 4
R_6 := 560
E_1 := 900
R_5 := 250
E_3 := 200
R_4 := 590
R_3 := 970
R_2 := 910
R_1 := 760
solve block
    # guess values
    I_11 := 1
    I_22 := 1
    # constraints
    I_11*(R_8 + R_5 + R_6 + R_2 + R_7) + J_02*R_2 - I_22*(R_2 + R_7) == 0
    I_22*(R_1 + R_2 + R_7) - I_11*(R_2 + R_7) - J_02*R_2 == E_1
    # solver
    [I_11; I_22] := Find(I_11, I_22) = [-0.903409; 2.42045]
end solve block
I_5 := I_11
I_3 := -J_03  # Это если слева обход :)
I_7 := I_22 - I_11
I_8 := I_11
I_2 := I_22 - J_02 - I_11
U_45xx := -I_5*(R_5 + R_6) + I_7*R_7 - I_3*R_3 + E_3
U_test := I_8*R_8 - I_2*R_2 - I_3*R_3 + E_3 = 6307.5
U_45xx = 6307.5
R_27 := R_2*R_7/(R_1 + R_2 + R_7)
R_71 := R_7*R_1/(R_1 + R_2 + R_7)
R_21 := R_2*R_1/(R_1 + R_2 + R_7)
R_Г := (R_8 + R_21)*(R_71 + R_6 + R_5)/(R_8 + R_21 + R_71 + R_6 + R_5) + R_27 + R_3 = 1516.85
I_4 := U_45xx/(R_Г + R_4) = 2.99381
