# Метод эквивалентного генератора напряжения
ORIGIN := 1  # Задаем начало нумерации строк и столбцов с единицы
# Задаем исходные данные
R := [760; 910; 970; 590; 250; 560; 450; 230]
E := [900; 0; 200; 0; 0; 0; 0; 0]
J := [0; 6; 4; 0; 0; 0; 0; 0]
# Формируем узловую матрицу А и контурную матрицу В
A := [
    0, -1, 1, 0, 0, 0, 1, 0;
    -1, 1, 0, 0, 0, 0, 0, 1;
    1, 0, 0, 0, 0, -1, -1, 0;
    0, 0, -1, 1, 0, 0, 0, 0;
    0, 0, 0, -1, 1, 0, 0, -1
]
B := [1, 1, 0, 0, 0, 0, 1, 0; 0, 1, 1, 1, 0, 0, 0, -1; 0, 0, 1, 1, 1, 1, -1, 0]
RD := diag(R)
RD[4, 4] := 0  # Задаем нулевое значение сопротивлению R4
# Определяем ток короткого замыкания в 4 ветви
IK := (B*RD*transpose(B))^-1*(B*E + B*RD*J)
I := transpose(B)*IK
IR := I - J
IKZ := IR[4]
IKZ = 4.15829
# Формируем диагональную матрицу G и задаем нулевое значение проводимости G4
RD := diag(R)
G := 1/RD
G[4, 4] := 0
# Определяем напряжение холостого хода в четвертой ветви
Ф := (A*G*transpose(A))^-1*(-A*G*E - A*J)
U := transpose(A)*Ф
UR := U + E
Uxx := UR[4]
Uxx = 6307.5
Rg := Uxx/IKZ
Rg = 1516.85  # Находим внутреннее сопротивление эквивалентного генератора
IR[4] := Uxx/(Rg + R[4])
IR[4] = 2.99381  # Определяем ток в четвертой ветви методом эквивалентного генератора
