# Метод контурных токов
ORIGIN := 1
R := [760; 910; 970; 590; 250; 560; 450; 230]
E := [900; 0; 200; 0; 0; 0; 0; 0]
J := [0; 6; 4; 0; 0; 0; 0; 0]
RD := diag(R)
G := 1/RD
RD = [
    760, 0, 0, 0, 0, 0, 0, 0;
    0, 910, 0, 0, 0, 0, 0, 0;
    0, 0, 970, 0, 0, 0, 0, 0;
    0, 0, 0, 590, 0, 0, 0, 0;
    0, 0, 0, 0, 250, 0, 0, 0;
    0, 0, 0, 0, 0, 560, 0, 0;
    0, 0, 0, 0, 0, 0, 450, 0;
    0, 0, 0, 0, 0, 0, 0, 230
]
A := [
    0, -1, 1, 0, 0, 0, 1, 0;
    -1, 1, 0, 0, 0, 0, 0, 1;
    1, 0, 0, 0, 0, -1, -1, 0;
    0, 0, -1, 1, 0, 0, 0, 0;
    0, 0, 0, -1, 1, 0, 0, -1
]
B := [1, 1, 0, 0, 0, 0, 1, 0; 0, 1, 1, 1, 0, 0, 0, -1; 0, 0, 1, 1, 1, 1, -1, 0]
IK := (B*RD*transpose(B))^-1*(B*E + B*RD*J)
IK = [1.83471; 2.80708; 0.186728]
I := transpose(B)*IK
transpose(I) = [1.83471, 4.64179, 2.99381, 2.99381, 0.186728, 0.186728, 1.64798, -2.80708]
IR := I - J
transpose(IR) = [1.83471, -1.35821, -1.00619, 2.99381, 0.186728, 0.186728, 1.64798, -2.80708]
