# Метод узловых потенциалов
ORIGIN := 1
R := [760; 910; 970; 590; 250; 560; 450; 230]
E := [900; 0; 200; 0; 0; 0; 0; 0]
J := [0; 6; 4; 0; 0; 0; 0; 0]
RD := diag(R)
G := 1/RD
RD = [
    760, 0, 0, 0, 0, 0, 0, 0;
    0, 910, 0, 0, 0, 0, 0, 0;
    0, 0, 970, 0, 0, 0, 0, 0;
    0, 0, 0, 590, 0, 0, 0, 0;
    0, 0, 0, 0, 250, 0, 0, 0;
    0, 0, 0, 0, 0, 560, 0, 0;
    0, 0, 0, 0, 0, 0, 450, 0;
    0, 0, 0, 0, 0, 0, 0, 230
]
A := [
    0, -1, 1, 0, 0, 0, 1, 0;
    -1, 1, 0, 0, 0, 0, 0, 1;
    1, 0, 0, 0, 0, -1, -1, 0;
    0, 0, -1, 1, 0, 0, 0, 0;
    0, 0, 0, -1, 1, 0, 0, -1
]
B := [1, 1, 0, 0, 0, 0, 1, 0; 0, 1, 1, 1, 0, 0, 0, -1; 0, 0, 1, 1, 1, 1, -1, 0]
Ф := (A*G*transpose(A))^-1*(-A*G*E - A*J)
Ф = [637.024; -598.947; -104.568; 1813.03; 46.682]
U := transpose(A)*Ф
transpose(U) = [494.379, -1235.97, -1176.01, 1766.35, 46.682, 104.568, 741.592, -645.629]
IR := G*(U + E)
transpose(IR) = [1.83471, -1.35821, -1.00619, 2.99381, 0.186728, 0.186728, 1.64798, -2.80708]
