R_8 := 230
R'_8 := 678.085
R_4356 := 448.085
R_56 := 810
R_7 := 450
R''_2 := 1158.936
R_437 := 248.936
R_43 := 1560
R_6 := 560
R'_1 := 889.255
R_567 := 129.255
J_02 := 6
R_5 := 250
E''_2 := 6110.968
E_437 := 650.968
J_03 := 4
R_4 := 590
E_3456 := 1171.742
E_3 := 200
R_3 := 970
E_1 := 900
E_02 := 5460
R_2 := 910
R_1 := 760
U_02 := (E''_2/R''_2 - E_3456/R'_8 - E_1/R'_1)/(1/R'_8 + 1/R''_2 + 1/R'_1) = 731.575
I'_2 := (E''_2 - U_02)/R''_2 = 4.64167
# Неважно какой обход возьмём при подсчёте напряжения, поэтому
# U_test = U_53
I_8 := (-E_3456 - U_02)/R'_8 = -2.8069
I_1 := (E_1 + U_02)/R'_1 = 1.83477
U_test := E_1 - I_1*R_1 - I_8*R_8 = 151.165
U_53 := I_8*R_4356 + E_3456 + I_1*R_567 = 151.165
I_5 := U_53/R_56
I_6 := I_5
U_13 := I'_2*R_437 - E_437 + I_1*R_567 = 741.662
I_7 := U_13/R_7 = 1.64814
U_15 := U_53 - U_13 = -590.497
# уз 2:
I_2 := I_1 - I_8 - J_02 = -1.35833
# уз 5:
I_4 := I_5 - I_8
# уз 4:
U_12 := -I_2*R_2
I_3 := I_4 - J_03
U_41 := E_3 - I_3*R_3
P_ист := J_02*U_12 + J_03*U_41 + I_3*E_3 + I_1*E_1 = 13571.6
P_пр := I_8^2*R_8 + I_5^2*(R_6 + R_5) + I_3^2*R_3 + I_4^2*R_4 + I_2^2*R_2 + I_1^2*R_1 + I_7^2*R_7 = 13569.8
# Надо чтобы сошлись мощности и всё тогда ок, записываем токи в ответ
# видос про два узла, и видос про преобразование в звезду + чекаем разобранный тр на сайте кафедры тоэ
# И будет вам счастье
transpose([I_1; I_2; I_3; I_4; I_5; I_6; I_7; I_8]) = [1.83477, -1.35833, -1.00648, 2.99352, 0.186623, 0.186623, 1.64814, -2.8069]
φ_1 := 0
U_62 := -I_8*R_8 - I_5*R_5 = 598.931
φ_4 := φ_1 - I_3*R_3 + E_3 = 1176.28  # другой обход
φ_5 := φ_4 - I_4*R_4 = -589.896
U_62t := -E_1 + I_1*R_1 + I_6*R_6 = 598.931
φ_2 := φ_5 + I_8*R_8 = -1235.48
φ_3 := φ_2 + I_1*R_1 - E_1 = -741.061
φ_final := φ_3 + I_7*R_7 = 0.601168  # это типо нуль
I_7*R_7 = 741.662
