R1 := 170
R2 := 350
R3 := 460
R4 := 560
R5 := 950
R6 := 570
R7 := 430
R8 := 360
E1 := 200
E3 := 200
J01 := 5
J02 := 1
E01 := J01*R1 = 850
E02 := J02*R2 = 350
E1N := E01 + E1 = 1050
R56 := R5 + R6 = 1520
R34 := R3 + R4 = 1020
J1N := E1N/R1 = 6.17647
R568 := R56*R8/(R1 + R8 + R56) = 266.927
R18 := R1*R8/(R1 + R8 + R56) = 29.8537
R156 := R1*R56/(R1 + R8 + R56) = 126.049
E18 := J1N*R18 = 184.39
E156 := J1N*R156 = 778.537
R34568 := R34 + R568 = 1286.93
R182 := R18 + R2 = 379.854
R1567 := R156 + R7 = 556.049
E02N := E18 + E02 = 534.39
UO3 := (E3/R34568 + (-E02N/R182) + E156/R1567)/(1/R34568 + 1/R182 + 1/R1567) = 28.552
I4 := (-UO3 + E3)/R34568 = 0.133223
I2N := (UO3 + E02N)/R182 = 1.482
I7 := (E156 - UO3)/R1567 = 1.34877
I3 := I4
U51 := -I4*R34 + E3 + I7*R7 = 644.086
U41 := I2N*R2 - E02 + I7*R7 = 748.672
U45 := U41 - U51 = 104.586
I6 := U51/R56 = 0.423741
I8 := U45/R8 = 0.290518
I1N := U41/R1 = 4.40396
I5 := I6
I1 := I7 + I6 - J01 = -3.22748
I2 := I7 + I4 - J02 = 0.481998
U14 := -I1*R1 + E1 = 748.672
U43 := I2*R2 = 168.699
Pist := E1*I1 + E3*I3 + J01*U14 - J02*U43 = 2955.81
Ppr := I1^2*R1 + I2^2*R2 + I3^2*R3 + I4^2*R4 + I5^2*R5 + I6^2*R6 + I7^2*R7 + I8^2*R8 = 2955.81
U64 := I6*R6 + I1*R1 - E1 = -507.14
Given
G1 := 1
G2 := 1
G1*(R7 + R6 + R5 + R8 + R2) - J02*R2 - G2*(R2 + R8) - J01*(R5 + R6 + R8) == 0
G2*(R2 + R8 + R4 + R3) + J02*R2 - G1*(R8 + R2) + J01*R8 == -E3
[G1N; G2N] := Find(G1, G2)
G1N = 3.70915
G2N = 0.163872
I8N := J01 + G2N - G1N = 1.45472
I5N := J01 - G1N = 1.29085
U14N := (I8N*R8 + I5N*(R5 + R6)) + (-E1) = 2285.78
R4N := R2*R8/(R2 + R8 + R34) = 72.8324
R5N := R8*R34/(R2 + R8 + R34) = 212.254
R3N := R2*R34/(R2 + R8 + R34) = 206.358
Requal := (R7 + R3N)*(R5 + R6 + R5N)/(R7 + R3N + R5 + R6 + R5N) + R4N = 538.225
I1N := U14N/(Requal + R1) = 3.22748
