R1 := 170
R5 := 950
E1 := 200
J01 := 5
R2 := 350
R6 := 570
E3 := 200
J02 := 1
R3 := 460
R7 := 430
R4 := 560
R8 := 360
Given
A1 := 1
A2 := 2
A3 := 3
A5 := 5
A7 := 7
A8 := 8
A5 + A7 - A1 == J01
A2 - A3 - A7 == -J02
A3 + A8 - A5 == 0
A1*R1 + A8*R8 + A5*(R5 + R6) == E1
A2*R2 + A3*(R3 + R4) - A8*R8 == E3
A2*R2 + A7*R7 + A1*R1 == E1
[I1; I2; I3; I5; I7; I8] := Find(A1, A2, A3, A5, A7, A8)
I1 = -3.22748
I5 = 0.423741
I2 = 0.481998
I7 = 1.34877
I3 = 0.133223
I8 = 0.290518
Given
B1 := 1
B2 := 1
B3 := 1
B1*(R1 + R8 + R5 + R6) - B2*R8 + B3*R1 - J01*R1 == E1
B2*(R2 + R3 + R4 + R8) - B1*R8 + B3*R2 - J02*R2 == E3
B3*(R7 + R1 + R2) + B1*R1 + B2*R2 - J01*R1 - J02*R2 == E3
[J1; J2; J3] := Find(B1, B2, B3)
J1 = 0.423741
J2 = 0.133223
J3 = 1.34877
I5 := J1 = 0.423741
I3 := J2 = 0.133223
I8 := J1 - J2 = 0.290518
I7 := J3 = 1.34877
I1 := (J1 + J3) - J01 = -3.22748
I2 := J2 + J3 - J02 = 0.481998
g11 := 1/(R5 + R6) + 1/R1 + 1/R7 = 0.00886583
g55 := 1/(R3 + R4) + 1/(R5 + R6) + 1/R8 = 0.00441606
g33 := 1/(R3 + R4) + 1/R2 + 1/R7 = 0.00616312
g15 := -1/(R5 + R6) = -0.000657895
I11 := -E1/R1 - J01 = -6.17647
g35 := -1/(R3 + R4) = -0.000980392
I55 := E3/(R3 + R4) = 0.196078
g13 := -1/R7 = -0.00232558
I33 := J02 - E3/(R3 + R4) = 0.803922
Given
F1 := 1
F5 := 2
F3 := 3
F1*g11 + F5*g15 + F3*g13 == I11
F1*g15 + F5*g55 + F3*g35 == I55
F1*g13 + F5*g35 + F3*g33 == I33
[F11; F55; F33] := Find(F1, F5, F3)
F11 = -748.672
F55 = -104.586
F33 = -168.699
F44 := 0
I1 := (F11 - F44 + E1)/R1 = -3.22748
I5 := (F55 - F11)/(R5 + R6) = 0.423741
I2 := (F44 - F33)/R2 = 0.481998
I7 := (F33 - F11)/R7 = 1.34877
I3 := (F33 - F55 + E3)/(R3 + R4) = 0.133223
I8 := (F44 - F55)/R8 = 0.290518
F66 := F55 - I5*R5 = -507.14
F22 := F33 - I3*R3 + E3 = -29.9817
F77 := F33 - I3*R3 = -229.982
F88 := F11 + E1 = -548.672
