# Метод контурных токов
ORIGIN := 1
j := sqrt(-1)
Z := [12j; 56 + 33j; 81 - 52j; 79; 39 - 21j; 43 - 26j]
E := [0; 0; 0; 0; 0; 11*e^(j*246°)]
ZD := diag(Z)
G := 1/ZD
ZD = [
    12i, 0, 0, 0, 0, 0;
    0, 56 + 33i, 0, 0, 0, 0;
    0, 0, 81 - 52i, 0, 0, 0;
    0, 0, 0, 79, 0, 0;
    0, 0, 0, 0, 39 - 21i, 0;
    0, 0, 0, 0, 0, 43 - 26i
]
A := [-1, 1, 0, 0, -1, 0; 0, 0, 0, 1, 1, -1; 1, 0, 1, -1, 0, 0]
B := [-1, -1, 1, 0, 0, 0; 0, 0, -1, -1, 0, -1; 1, 0, 0, 1, -1, 0]
IK := (B*ZD*transpose(B))^-1*(B*E)
IK = [0.0340735 + 0.0504182i; 0.0131252 + 0.0909404i; -0.00124079 + 0.0642543i]
IZ := transpose(B)*IK
IZ = [-0.0353143 + 0.0138362i; -0.0340735 - 0.0504182i; 0.0209483 - 0.0405223i; -0.014366 - 0.0266861i; 0.00124079 - 0.0642543i; -0.0131252 - 0.0909404i]
