# Метод узловых потенциалов
ORIGIN := 1
j := sqrt(-1)
Z := [12j; 56 + 33j; 81 - 52j; 79; 39 - 21j; 43 - 26j]
E := [0; 0; 0; 0; 0; 11*e^(j*246°)]
ZD := diag(Z)
G := 1/ZD
ZD = [
    12i, 0, 0, 0, 0, 0;
    0, 56 + 33i, 0, 0, 0, 0;
    0, 0, 81 - 52i, 0, 0, 0;
    0, 0, 0, 79, 0, 0;
    0, 0, 0, 0, 39 - 21i, 0;
    0, 0, 0, 0, 0, 43 - 26i
]
A := [-1, 1, 0, 0, -1, 0; 0, 0, 0, 1, 1, -1; 1, 0, 1, -1, 0, 0]
B := [-1, -1, 1, 0, 0, 0; 0, 0, -1, -1, 0, -1; 1, 0, 0, 1, -1, 0]
Ф := (A*G*transpose(A))^-1*(-A*G*E)
Ф = [-0.244316 - 3.94784i; -1.54527 - 6.47982i; -0.41035 - 4.37161i]
U := transpose(A)*Ф
transpose(U) = [-0.166034 - 0.423771i, -0.244316 - 3.94784i, -0.41035 - 4.37161i, -1.13492 - 2.1082i, -1.30095 - 2.53197i, 1.54527 + 6.47982i]
IZ := G*(U + E)
IZ = [-0.0353143 + 0.0138362i; -0.0340735 - 0.0504182i; 0.0209483 - 0.0405223i; -0.014366 - 0.0266861i; 0.00124079 - 0.0642543i; -0.0131252 - 0.0909404i]
