j := sqrt(-1)
ORIGIN := 1
R := transpose([0, 0, 54, 0, 46, 65, 0, 34])
XL := transpose([27, 12, 0, 38, 0, 0, 48, 0])
XC := transpose([0, 58, 83, 66, 0, 0, 0, 18])
Z := R + j*(XL - XC)
Z[1] = 27i
Z1 := 27j
Z2 := -46j
Z3 := 54 - 83j
Z4 := -28j
Z5 := 46
Z6 := 65
Z7 := 48j
Z8 := 34 - 18j
Z[2] = -46i
Z[3] = 54 - 83i
Z[4] = -28i
Z[5] = 46
Z[6] = 65
Z_56 := Z[5] + Z[6] = 111
Z[7] = 48i
Z7 := 48j
Z[8] = 34 - 18i
E[4] := 93*e^(j*258*deg) = -19.3358 - 90.9677i
Z_34 := Z[3] + Z[4] = 54 - 111i
Z_18 := Z[8]*Z[1]/(Z[1] + Z[2] + Z[8]) = -6.90772 + 19.4828i
Z_28 := Z[2]*Z[8]/(Z[1] + Z[2] + Z[8]) = 11.7687 - 33.1929i
Z_12 := Z[1]*Z[2]/(Z[1] + Z[2] + Z[8]) = 16.724 + 18.1996i
Z0 := (Z_18 + Z_56)*(Z_12 + Z[7])/(Z_18 + Z_56 + Z_12 + Z[7]) + Z_34 + Z_28 = 96.4388 - 106.211i
I4 := E[4]/Z0 = 0.378843 - 0.526037i
I5 := I4*((Z_12 + Z[7])/(Z_18 + Z_56 + Z_12 + Z[7])) = 0.290261 - 0.0710868i
I7 := I5 - I4 = -0.0885817 + 0.45495i
U46 := I4*Z_34 + I5*Z_56 - E[4] = 13.6223 + 12.6195i
I8 := U46/Z[8] = 0.159463 + 0.455584i
I1 := I8 + I5 = 0.449724 + 0.384497i
I2 := I1 - I7 = 0.538306 - 0.0704528i
I4 = 0.378843 - 0.526037i
I66 := 0.379 + 0.526j
S := E[4]*I66 = 40.5208 - 44.6474i
S = 40.5208 - 44.6474i
I1 = 0.449724 + 0.384497i
I2 = 0.538306 - 0.0704528i
I3 := I4 = 0.378843 - 0.526037i
I4 = 0.378843 - 0.526037i
I5 = 0.290261 - 0.0710868i
I6 := I5 = 0.290261 - 0.0710868i
I7 = -0.0885817 + 0.45495i
I8 = 0.159463 + 0.455584i
Ppotr := |I3|^2*54 + |I5|^2*46 + |I5|^2*65 + |I8|^2*34 = 40.5271
i1 := S = 40.5208 - 44.6474i
i7 := I7 = -0.0885817 + 0.45495i
i2 := I2 = 0.538306 - 0.0704528i
i3 := I3 = 0.378843 - 0.526037i
i8 := I8 = 0.159463 + 0.455584i
i4 := I4 = 0.378843 - 0.526037i
i5 := I5 = 0.290261 - 0.0710868i
Spotr := 40.251 - 44.634*j = 40.251 - 44.634i
Q := |I1|^2*27 + |I2|^2*(12 - 58) + |I3|^2*(-83) + |I4|^2*(38 - 66) + |I7|^2*48 + |I8|^2*(-18) = -44.6338
Мэг
Z := Z_56*(Z[1] + Z[7])/(Z_56 + Z[1] + Z[7]) + Z_34 + Z[8] = 122.792 - 77.508i
I4 := E[4]/Z = 0.221787 - 0.600833i
I7 := -I4*Z_56/(Z_56 + Z1 + Z7) = 0.126452 + 0.515393i
U := -I4*Z8 + I7*Z1 = -10.6414 + 27.8347i
Z5 + Z6 = 111
Z3 + Z4 = 54 - 111i
Z8 = 34 - 18i
Z568 := (Z5 + Z6)*Z8/(Z3 + Z4 + Z8 + Z5 + Z6) = 17.9362 + 1.58679i
Z348 := (Z3 + Z4)*Z8/(Z3 + Z4 + Z8 + Z5 + Z6) = 10.3125 - 17.1643i
Z3456 := (Z3 + Z4)*(Z5 + Z6)/(Z3 + Z4 + Z8 + Z5 + Z6) = 49.4686 - 29.847i
ZXX := Z348 + (Z568 + Z1)*(Z3456 + Z7)/(Z568 + Z1 + Z3456 + Z7) = 26.0888 - 2.29346i
I3 + I7 - I5 = 0.215033 + 0.0604432i
I1 - I5 - I8 = 2.77556e-17
I := U/(ZXX + Z2) = -0.538306 + 0.0704528i
XL[7]*j*I7 = -24.7389 + 6.06968i
U2 := 0 + I5*65 = 18.867 - 4.62064i
i6 := U2 = 18.867 - 4.62064i
U3 := U2 + I5*46 = 32.219 - 7.89064i
i6 := U3 = 32.219 - 7.89064i
U4 := U3 + XL[7]*j*I7 + 2.901 - 10.322j = 10.3811 - 12.143i
i6 := U4 = 10.3811 - 12.143i
U5 := U4 - XL[2]*j*I2 = 9.53572 - 18.6026i
i6 := U5 = 9.53572 - 18.6026i
|U2| = 19.4246
arg(U2)/deg = -13.7612
U6 := U5 + XC[2]*j*I2 = 13.622 + 12.6191i
i6 := U6 = 13.622 + 12.6191i
U7 := U6 - I8*R[8] = 8.20024 - 2.87073i
U8 := U6 - I3*R[3] = -6.83555 + 41.0251i
i6 := U7 = 8.20024 - 2.87073i
i6 := U8 = -6.83555 + 41.0251i
U9 := U8 + XC[3]*j*I3 = 36.8255 + 72.4691i
i6 := U9 = 36.8255 + 72.4691i
U10 := U9 - XL[4]*j*I3 = 16.8361 + 58.073i
i6 := U10 = 16.8361 + 58.073i
U11 := U10 + XC[4]*j*I3 = 51.5545 + 83.0767i
i6 := U11 = 51.5545 + 83.0767i
U12 := U11 + E[4] = 32.2187 - 7.89104i
i6 := ZXX = 26.0888 - 2.29346i
U3 - U12 = 0.000272135 + 0.000397912i
U1 := XC[8]*j*I8 = -8.20051 + 2.87033i
i6 := U1 = -8.20051 + 2.87033i
U1 := U4 + I1*XL[1]*j = -0.000272135 - 0.000397912i
X := [0; 18.867; 32.219; 10.381; 9.536; 13.622; 8.2; -6.836; 36.826; 16.836; 51.555; 0]
Y := [0; -4.621; -7.891; -12.143; -18.603; 12.619; -2.871; 41.025; 72.469; 58.073; 83.077; 0]
# [plot: Y vs X]
I := (40 + 2*j*(20 + j*30))/(20 + 40 + j*30 - j*10) = -0.1 + 0.7i
i6 := I = -0.1 + 0.7i
