# Метод законов Кирхгофа
ORIGIN := 1
j := sqrt(-1)
Z1 := 12j
Z2 := 56 + 33j
Z3 := 81 - 52j
Z4 := 79
Z5 := 39 - 21j
Z6 := 43 - 26j
E6 := 11*e^(j*246°) = -4.4741 - 10.049i
A := [
    1, -1, 0, 0, 1, 0;
    0, 0, 0, -1, -1, 1;
    -1, 0, -1, 1, 0, 0;
    -Z1, -Z2, Z3, 0, 0, 0;
    0, 0, -Z3, -Z4, 0, -Z6;
    Z1, 0, 0, Z4, -Z5, 0
]
B := [0; 0; 0; 0; -E6; 0]
A = [
    1, -1, 0, 0, 1, 0;
    0, 0, 0, -1, -1, 1;
    -1, 0, -1, 1, 0, 0;
    -12i, -56 - 33i, 81 - 52i, 0, 0, 0;
    0, 0, -81 + 52i, -79, 0, -43 + 26i;
    12i, 0, 0, 79, -39 + 21i, 0
]
B = [0; 0; 0; 0; 4.4741 + 10.049i; 0]
X := A^-1*B
X = [-0.0353143 + 0.0138362i; -0.0340735 - 0.0504182i; 0.0209483 - 0.0405223i; -0.014366 - 0.0266861i; 0.00124079 - 0.0642543i; -0.0131252 - 0.0909404i]
