j := sqrt(-1)
R1 := 0
XL1 := 12
XC1 := 0
R2 := 56
XL2 := 57
XC2 := 24
R3 := 81
XL3 := 0
XC3 := 52
R4 := 79
XL4 := 21
XC4 := 21
R5 := 39
XL5 := 21
XC5 := 42
R6 := 43
XL6 := 16
XC6 := 42
Z1 := R1 + j*XL1 - j*XC1 = 12i
Z2 := R2 + j*XL2 - j*XC2 = 56 + 33i
Z3 := R3 + j*XL3 - j*XC3 = 81 - 52i
Z4 := R4 + j*XL4 - j*XC4 = 79
Z5 := R5 + j*XL5 - j*XC5 = 39 - 21i
Z6 := R6 + j*XL6 - j*XC6 = 43 - 26i
E6 := 11*e^(j*246°) = -4.4741 - 10.049i
Z1 + Z2 + Z3 = 137 - 7i
Z1*Z2 = -396 + 672i
Z12 := (Z1*Z2)/(Z1 + Z2 + Z3) = -3.13296 + 4.74503i
Z13 := (Z1*Z3)/(Z1 + Z2 + Z3) = 4.18132 + 7.30853i
Z23 := (Z2*Z3)/(Z1 + Z2 + Z3) = 45.6051 + 0.585663i
Z12 + Z5 = 35.867 - 16.255i
Z12 = -3.13296 + 4.74503i
Z0 := (Z12 + Z5)*(Z13 + Z4)/(Z12 + Z5 + Z13 + Z4) + Z6 + Z23 = 115.202 - 32.5713i
I6 := E6/Z0 = -0.0131252 - 0.0909404i
Z13 + Z4 = 83.1813 + 7.30853i
Z12 + Z5 + Z13 + Z4 = 119.048 - 8.94643i
I4 := I6*((Z12 + Z5)/(Z12 + Z5 + Z4 + Z13)) = -0.014366 - 0.0266861i
I5 := I6*((Z13 + Z4)/(Z12 + Z5 + Z4 + Z13)) = 0.00124079 - 0.0642543i
U13 := -I4*Z4 + I5*Z5 = -0.166034 - 0.423771i
I1 := U13/Z1 = -0.0353143 + 0.0138362i
I2 := I1 + I5 = -0.0340735 - 0.0504182i
I3 := I4 - I1 = 0.0209483 - 0.0405223i
I6 = -0.0131252 - 0.0909404i
I66 := -0.013 + 0.091*j
S := E6*I66 = 0.972622 - 0.276506i
Ppotr := |I2|^2*R2 + |I3|^2*R3 + |I4|^2*R4 + |I5|^2*R5 + |I6|^2*R6 = 0.972584
S = 0.972622 - 0.276506i
I1 = -0.0353143 + 0.0138362i
I2 = -0.0340735 - 0.0504182i
I3 = 0.0209483 - 0.0405223i
I4 = -0.014366 - 0.0266861i
I5 = 0.00124079 - 0.0642543i
I6 = -0.0131252 - 0.0909404i
i1 := I1 = -0.0353143 + 0.0138362i
i2 := I2 = -0.0340735 - 0.0504182i
i3 := I3 = 0.0209483 - 0.0405223i
i4 := I4 = -0.014366 - 0.0266861i
i5 := I5 = 0.00124079 - 0.0642543i
i6 := I6 = -0.0131252 - 0.0909404i
Spotr := 0.973 - 0.275*j = 0.973 - 0.275i
Q := |I1|^2*XL1 + |I2|^2*(XL2 - XC2) + |I3|^2*(-XC3) + |I4|^2*(XL4 - XC4) + |I5|^2*(XL5 - XC5) + |I6|^2*(XL6 - XC6) = -0.274981
Q1 := 0.038*0.038*XL1 = 0.017328
Q2 := 0.061*0.061*(XL2 - XC2) = 0.122793
Q3 := 0.046*0.046*(XL3 - XC3) = -0.110032
Q4 := 0.03*0.03*(XL4 - XC4) = 0
Q5 := 0.064*0.064*(XL5 - XC5) = -0.086016
Q6 := 0.092*0.092*(XL6 - XC6) = -0.220064
Q := Q1 + Q2 + Q3 + Q4 + Q5 + Q6 = -0.275991
S = 0.972622 - 0.276506i
Zgen := (Z12 + Z5)*(Z13 + Z4)/(Z12 + Z5 + Z13 + Z4) + Z23 = 72.2018 - 6.57133i
Uxx := E6 = -4.4741 - 10.049i
f1 := 0
f2 := f1 + j*XL1*I1 = -0.166034 - 0.423771i
f3 := f2 + R4*I4 = -1.30095 - 2.53197i
f4 := f3 + j*XL4*I4 = -0.740541 - 2.83366i
f5 := f4 - j*XC4*I4 = -1.30095 - 2.53197i
f6 := f5 - E6 = 3.17315 + 7.51703i
f7 := f6 - j*XC6*I6 = -0.646345 + 8.06829i
f8 := f7 + j*XL6*I6 = 0.808702 + 7.85828i
f9 := f8 + R6*I6 = 0.244316 + 3.94784i
f10 := f9 - j*XC2*I2 = -0.96572 + 4.76561i
f11 := f10 + j*XL2*I2 = 1.90812 + 2.82342i
f1 := f11 + R2*I2 = -3.55271e-15 - 3.9968e-15i
f12 := f2 + j*XC3*I3 = 1.94112 + 0.665538i
f9 := f12 - R3*I3 = 0.244316 + 3.94784i
f13 := f1 + R5*I5 = 0.0483907 - 2.50592i
f14 := f13 + j*XL5*I5 = 1.39773 - 2.47986i
f5 := f14 - j*XC5*I5 = -1.30095 - 2.53197i
XL6*I6 = -0.210004 - 1.45505i
R6*I6 = -0.564385 - 3.91044i
XC2*I2 = -0.817764 - 1.21004i
XL2*I2 = -1.94219 - 2.87384i
R2*I2 = -1.90812 - 2.82342i
XC3*I3 = 1.08931 - 2.10716i
R3*I3 = 1.69681 - 3.2823i
R5*I5 = 0.0483907 - 2.50592i
XL5*I5 = 0.0260565 - 1.34934i
XC5*I5 = 0.052113 - 2.69868i
