ORIGIN := 1
j := sqrt(-1)
# Исходные данные
E3 := 58*e^(j*132*deg) = -38.8096 + 43.1024i
R := [69, 59, 0, 0, 0, 21, 0, 92]
XL := [0, 0, 43, 48, 24, 0, 14, 0]
XC := [33, 0, 99, 17, 0, 0, 32, 0]
Z := R + j*XL - j*XC = [69 - 33i, 59, -56i, 31i, 24i, 21, -18i, 92]
# Представим уравнения в виде матрицы
A := [
    1, -1, 0, 0, -1, 0;
    -1, 0, 0, 1, 0, 1;
    0, 1, -1, 0, 0, -1;
    Z[1, 1], Z[1, 2], 0, 0, 0, Z[1, 8];
    Z[1, 1], 0, 0, Z[1, 5] + Z[1, 6], Z[1, 7], 0;
    0, -Z[1, 2], -Z[1, 3] - Z[1, 4], 0, Z[1, 7], 0
]
B := [0; 0; 0; 0; 0; -E3]
# Проведем расчет
[I[1]; I[2]; I[3]; I[5]; I[7]; I[8]] := A^-1*B = [0.0693755 + 0.209645i; -0.706423 + 0.0564816i; -1.03222 + 0.225052i; -0.256426 + 0.378215i; 0.775798 + 0.153163i; 0.325802 - 0.168571i]
I[4] := I[3]
I[6] := I[5]
# Учитывая, что:
# Решение примет вид
I = [0.0693755 + 0.209645i; -0.706423 + 0.0564816i; -1.03222 + 0.225052i; -1.03222 + 0.225052i; -0.256426 + 0.378215i; -0.256426 + 0.378215i; 0.775798 + 0.153163i; 0.325802 - 0.168571i]
