# Метод контурных токов
ORIGIN := 1
j := sqrt(-1)
Z := [69 - 33j; 59; -56j; 31j; 24j; 21; -18j; 92]
E := [0; 0; 58*e^(j*132°); 0; 0; 0; 0; 0]
ZD := diag(Z)
G := 1/ZD
ZD = [
    69 - 33i, 0, 0, 0, 0, 0, 0, 0;
    0, 59, 0, 0, 0, 0, 0, 0;
    0, 0, -56i, 0, 0, 0, 0, 0;
    0, 0, 0, 31i, 0, 0, 0, 0;
    0, 0, 0, 0, 24i, 0, 0, 0;
    0, 0, 0, 0, 0, 21, 0, 0;
    0, 0, 0, 0, 0, 0, -18i, 0;
    0, 0, 0, 0, 0, 0, 0, 92
]
A := [
    0, 0, 0, 0, -1, 1, 0, 0;
    0, -1, 1, 0, 0, 0, 0, 1;
    0, 0, 0, -1, 1, 0, -1, 0;
    0, 0, -1, 1, 0, 0, 0, 0;
    1, 0, 0, 0, 0, -1, 0, -1
]
B := [1, 1, 0, 0, 0, 0, 0, 1; 0, 1, 1, 1, 0, 0, -1, 0; 0, 0, 1, 1, 1, 1, 0, -1]
IK := (B*ZD*transpose(B))^-1*(B*E)
IK = [0.0693755 + 0.209645i; -0.775798 - 0.153163i; -0.256426 + 0.378215i]
IZ := transpose(B)*IK
IZ = [0.0693755 + 0.209645i; -0.706423 + 0.0564816i; -1.03222 + 0.225052i; -1.03222 + 0.225052i; -0.256426 + 0.378215i; -0.256426 + 0.378215i; 0.775798 + 0.153163i; 0.325802 - 0.168571i]
