# Метод узловых потенциалов
ORIGIN := 1
j := sqrt(-1)
Z := [69 - 33j; 59; -56j; 31j; 24j; 21; -18j; 92]
E := [0; 0; 58*e^(j*132°); 0; 0; 0; 0; 0]
ZD := diag(Z)
G := 1/ZD
ZD = [
    69 - 33i, 0, 0, 0, 0, 0, 0, 0;
    0, 59, 0, 0, 0, 0, 0, 0;
    0, 0, -56i, 0, 0, 0, 0, 0;
    0, 0, 0, 31i, 0, 0, 0, 0;
    0, 0, 0, 0, 24i, 0, 0, 0;
    0, 0, 0, 0, 0, 21, 0, 0;
    0, 0, 0, 0, 0, 0, -18i, 0;
    0, 0, 0, 0, 0, 0, 0, 92
]
A := [
    0, 0, 0, 0, -1, 1, 0, 0;
    0, -1, 1, 0, 0, 0, 0, 1;
    0, 0, 0, -1, 1, 0, -1, 0;
    0, 0, -1, 1, 0, 0, 0, 0;
    1, 0, 0, 0, 0, -1, 0, -1
]
B := [1, 1, 0, 0, 0, 0, 0, 1; 0, 1, 1, 1, 0, 0, -1, 0; 0, 0, 1, 1, 1, 1, 0, -1]
Ф := (A*G*transpose(A))^-1*(-A*G*E)
Ф = [6.32023 + 20.1186i; 41.6789 - 3.33241i; -2.75693 + 13.9644i; -9.73355 - 18.0346i; 11.7052 + 12.1761i]
U := transpose(A)*Ф
transpose(U) = [11.7052 + 12.1761i, -41.6789 + 3.33241i, 51.4125 + 14.7022i, -6.97662 - 31.999i, -9.07716 - 6.15423i, -5.38495 + 7.94252i, 2.75693 - 13.9644i, 29.9738 - 15.5085i]
IZ := G*(U + E)
IZ = [0.0693755 + 0.209645i; -0.706423 + 0.0564816i; -1.03222 + 0.225052i; -1.03222 + 0.225052i; -0.256426 + 0.378215i; -0.256426 + 0.378215i; 0.775798 + 0.153163i; 0.325802 - 0.168571i]
