j := sqrt(-1)
R1 := 69
R7 := 0
XL1 := 0
XL7 := 14
XC1 := 33
XC7 := 32
R2 := 59
R8 := 92
XL2 := 0
XL8 := 0
XC2 := 0
XC8 := 0
R3 := 0
XL3 := 43
XC3 := 99
R4 := 0
XL4 := 48
XC4 := 17
R5 := 0
XL5 := 24
XC5 := 0
R6 := 21
XL6 := 0
XC6 := 0
Z1 := R1 - j*XC1 = 69 - 33i
Z7 := R7 + j*XL7 - j*XC7 = -18i
Z2 := R2 = 59
Z8 := R8 + j*XL8 - j*XC8 = 92
Z3 := j*XL3 - j*XC3 = -56i
Z4 := j*XL4 - j*XC4 = 31i
Z5 := R5 + j*XL5 - j*XC5 = 24i
Z6 := R6 + j*XL6 - j*XC6 = 21
Z56 := Z6 + Z5 = 21 + 24i
Z34 := Z3 + Z4 = -25i
E3 := 58*e^(j*132°) = -38.8096 + 43.1024i
solve block
    # guess values
    I_11 := 1
    I_22 := 1
    I_33 := 1
    # constraints
    I_11*(Z1 + Z2 + Z8) - I_33*Z8 + I_22*Z2 == 0
    I_22*(Z7 + Z2 + Z34) + I_11*Z2 + I_33*Z34 == E3
    I_33*(Z5 + Z8 + Z34) - I_11*Z8 + I_22*Z34 == E3
    # solver
    [I_11; I_22; I_33] := Find(I_11, I_22, I_33) = [-0.0113789 + 0.308542i; -0.708808 - 0.251828i; -0.371099 + 0.580402i]
end solve block
Z12 := (Z1*Z2)/(Z1 + Z2 + Z8) = 19.3956 - 5.94065i
Z18 := (Z1*Z8)/(Z1 + Z2 + Z8) = 30.2441 - 9.26339i
Z28 := (Z2*Z8)/(Z1 + Z2 + Z8) = 24.1298 + 3.61947i
Z0 := (Z18 + Z56)*(Z12 + Z7)/(Z18 + Z56 + Z12 + Z7) + Z34 + Z28 = 44.5828 - 32.0366i
I4 := E3/Z0 = -1.03222 + 0.225052i
dx := I_33 + I_22 = -1.07991 + 0.328574i
I5 := I4*((Z12 + Z7)/(Z12 + Z7 + Z18 + Z56)) = -0.256426 + 0.378215i
I7 := I5 - I4 = 0.775798 + 0.153163i
Z12ч := (Z1*Z2)/(Z1 + Z2 + Z8) = 19.3956 - 5.94065i
U25 := I4*Z34 + I5*Z56 - E3 = 29.9738 - 15.5085i
Z18ч := (Z1*Z8)/(Z1 + Z2 + Z8) = 30.2441 - 9.26339i
I8 := U25/Z8 = 0.325802 - 0.168571i
Z28ч := (Z2*Z8)/(Z1 + Z2 + Z8) = 24.1298 + 3.61947i
I1 := I8 + I5 = 0.0693755 + 0.209645i
I4 = -1.03222 + 0.225052i
I2 := I1 - I7 = -0.706423 + 0.0564816i
I6 := I5
I3 := I4
I66 := Re(I4) - Im(I4)*j
Z0ч := (Z18ч + Z5)*(Z12ч + Z7)/(Z18ч + Z5 + Z12ч + Z7) + Z34 + Z28ч = 44.0078 - 26.5231i
# Используем сопряжённое число, мб из-за поворота нашего тока т.к комплексн составляющая E
S := E3*I66 = 49.7605 - 35.7572i
I3x := E3/Z0ч = -1.07991 + 0.328574i
Ppotr := |I1|^2*R1 + |I2|^2*R2 + |I6|^2*R6 + |I8|^2*R8 = 49.7605
S = 49.7605 - 35.7572i
I5x := I_33
I8x := -I_33 + I_11 = 0.35972 - 0.27186i
I1x := I_11
I1 = 0.0693755 + 0.209645i
I7 = 0.775798 + 0.153163i
I7x := -I_22
I2 = -0.706423 + 0.0564816i
I8 = 0.325802 - 0.168571i
I3 = -1.03222 + 0.225052i
I3x + I7x = -0.371099 + 0.580402i
I4 = -1.03222 + 0.225052i
I2x := I_11 + I_22
I5 = -0.256426 + 0.378215i
I6 = -0.256426 + 0.378215i
i1 := I1 = 0.0693755 + 0.209645i
i7 := I7 = 0.775798 + 0.153163i
i2 := I2 = -0.706423 + 0.0564816i
i8 := I8 = 0.325802 - 0.168571i
i3 := I3 = -1.03222 + 0.225052i
i4 := I4 = -1.03222 + 0.225052i
i5 := I5 = -0.256426 + 0.378215i
i6 := I6 = -0.256426 + 0.378215i
Spotr := 49.76 - 35.757j = 49.76 - 35.757i
Q := |I1|^2*(XL1 - XC1) + |I3|^2*(XL3 - XC3) + |I4|^2*(XL4 - XC4) + |I5|^2*(XL5 - XC5) + |I6|^2*(XL6 - XC6) + |I7|^2*(XL7 - XC7)
Q = -35.7572
S = 49.7605 - 35.7572i
Uxx := E3 - I3x*Z34 + I5x*Z5 + I8x*Z8 = -27.8593 - 17.8128i
Z348 := Z34*Z8/(Z34 + Z8 + Z5)
d := -I1x*Z1 - I7x*Z7 + I5x*Z5 = -27.8593 - 17.8128i
Z345 := Z34*Z5/(Z34 + Z8 + Z5)
v := Uxx/I6 - Z6 = -19.0518 + 72.339i
Z58 := Z5*Z8/(Z34 + Z8 + Z5)
r := Uxx/Z6 = -1.32663 - 0.848227i
fuck := -I1x*Z1 - I2x*Z2 - I3x*Z34 + E3 + I5x*Z5 = -27.8593 - 17.8128i
Zgen := (Z58 + Z1)*(Z7 + Z345)/(Z58 + Z1 + Z7 + Z345) + Z2 + Z348 = 68.0925 - 38.9962i
I6x := d/(Zgen + Z6) = -0.188982 - 0.282654i
c := I8x*Z8 + I2x*Z2 - I7x*Z7 + I5x*Z5 = -27.8593 - 17.8128i
f1 := 0
f2 := f1 + j*XL1*I1 = 0
f3 := f2 + R4*I4 = 0
f4 := f3 + j*XL4*I4 = -10.8025 - 49.5468i
f5 := f4 - j*XC4*I4 = -6.97662 - 31.999i
f6 := f5 - E6
f7 := f6 - j*XC6*I6
f8 := f7 + j*XL6*I6
f9 := f8 + R6*I6
f10 := f9 - j*XC2*I2
f11 := f10 + j*XL2*I2
f1 := f11 + R2*I2
f12 := f2 + j*XC3*I3 = -22.2802 - 102.19i
f9 := f12 - R3*I3 = -22.2802 - 102.19i
f13 := f1 + R5*I5
f14 := f13 + j*XL5*I5
f5 := f14 - j*XC5*I5
XL6*I6 = 0
R6*I6 = -5.38495 + 7.94252i
XC2*I2 = 0
XL2*I2 = 0
R2*I2 = -41.6789 + 3.33241i
XC3*I3 = -102.19 + 22.2802i
R3*I3 = 0
R5*I5 = 0
XL5*I5 = -6.15423 + 9.07716i
XC5*I5 = 0
