j := (-1)^(1/2)
R1 := 61
XL2 := 59
XC2 := 23
R3 := 82
XL5 := 23
XC3 := 55
R4 := 64
XL6 := 34
XC4 := 47
R5 := 31
XC5 := 21
R6 := 33
XC6 := 17
E3 := -13.8075728 + 5.860966927j
|E3| = 15
arg(E3)/deg = 157
Z1 := R1 = 61
Z2 := j*XL2 - j*XC2 = 36i
Z3 := R3 - j*XC3 = 82 - 55i
Z4 := R4 - j*XC4 = 64 - 47i
Z5 := R5 + j*XL5 - j*XC5 = 31 + 2i
Z6 := R6 + j*XL6 - j*XC6 = 33 + 17i
Given
J1 := 1
J2 := 2
J1*(Z6 + Z3 + Z1 + Z5) + J2*(Z6 + Z3) == E3
J2*(Z6 + Z3 + Z4) + J1*(Z6 + Z3) == E3
[j1; j2] := Find(J1, J2)
j1 = -0.0401093 + 0.0184776i
j2 = -0.0499058 - 0.0113414i
I3 := j1 + j2 = -0.0900151 + 0.00713626i
I1 := j1
U := I3*Z3 - E3 + I1*Z1 = 4.37216 + 0.802172i
Z01 := Z6*Z3/(Z3 + Z4 + Z6) = 17.5094 + 5.96256i
|U| = 4.44514
arg(U)/deg = 10.3966
Z02 := Z3*Z4/(Z3 + Z4 + Z6) = 28.1024 - 27.8508i
Z03 := Z6*Z4/(Z3 + Z4 + Z6) = 14.2725 + 4.19085i
Z0 := Z01 + (Z02 + Z1)*(Z03 + Z5)/(Z02 + Z1 + Z03 + Z5) = 48.8487 + 5.73597i
|Z0| = 49.1843
arg(Z0)/deg = 6.69718
I2 := U/(Z0 + Z2) = 0.059847 - 0.0347113i
|I2| = 0.0691848
arg(I2)/deg = -30.1137
