j := (-1)^(1/2)
R1 := 61
XL2 := 59
XC2 := 23
R3 := 82
XL5 := 23
XC3 := 55
R4 := 64
XL6 := 34
XC4 := 47
R5 := 31
XC5 := 21
R6 := 33
XC6 := 17
E3 := -13.8075728 + 5.860966927j
|E3| = 15
arg(E3)/deg = 157
Z1 := R1 = 61
Z2 := j*XL2 - j*XC2 = 36i
Z3 := R3 - j*XC3 = 82 - 55i
Z4 := R4 - j*XC4 = 64 - 47i
Z5 := R5 + j*XL5 - j*XC5 = 31 + 2i
Z6 := R6 + j*XL6 - j*XC6 = 33 + 17i
Z03 := Z6*Z5/(Z2 + Z5 + Z6) = 13.4688 - 2.30909i
Z01 := Z6*Z2/(Z2 + Z5 + Z6) = 3.67533 + 15.404i
Z04 := Z2*Z5/(Z2 + Z5 + Z6) = 7.97248 + 10.5862i
Z034 := Z03 + Z4 = 77.4688 - 49.3091i
Z013 := Z01 + Z3 = 85.6753 - 39.596i
Z041 := Z04 + Z1 = 68.9725 + 10.5862i
U20 := E3/Z013/(1/Z041 + 1/Z013 + 1/Z034) = -4.57791 + 0.975437i
|U20| = 4.68068
arg(U20)/deg = 167.972
I3 := (-U20 + E3)/Z013 = -0.110484 + 0.00596218i
|I3| = 0.110645
arg(I3)/deg = 176.911
I1 := U20/Z041 = -0.0627247 + 0.0237696i
|I1| = 0.0670775
arg(I1)/deg = 159.246
I4 := U20/Z034 = -0.0477591 - 0.0178075i
|I4| = 0.050971
arg(I4)/deg = -159.552
U31 := I4*Z03 + I3*Z01 = -1.18228 - 1.80955i
|U31| = 2.16154
arg(U31)/deg = -123.159
U14 := -I3*Z01 - I1*Z04 = 1.24961 + 2.15449i
|U14| = 2.49065
arg(U14)/deg = 59.8863
U34 := I4*Z03 - I1*Z04 = 0.0673256 + 0.344946i
|U34| = 0.351455
arg(U34)/deg = 78.956
I6 := -U31/Z6 = 0.0506368 + 0.0287491i
|I6| = 0.0582289
arg(I6)/deg = 29.5858
I2 := -U14/Z2 = -0.059847 + 0.0347113i
|I2| = 0.0691848
arg(I2)/deg = 149.886
I5 := -U34/Z5 = -0.00287771 - 0.0109416i
|I5| = 0.0113137
arg(I5)/deg = -104.735
I3 + I6 - I2 = -2.08167e-17 - 6.93889e-18i
I3 - I4 - I1 = -4.16334e-17
I4 + I5 + I6 = 6.93889e-18i
I1 - I2 - I5 = 2.21177e-17 - 1.38778e-17i
I3N := Re(I3) + j*Im(I3)*(-1) = -0.110484 - 0.00596218i
|I3N| = 0.110645
arg(I3N)/deg = -176.911
SGEN := E3*I3N = 1.56046 - 0.565219i
P := |I1|^2*R1 + |I3|^2*R3 + |I4|^2*R4 + |I5|^2*R5 + |I6|^2*R6 = 1.56046
Q := |I2|^2*(XL2 - XC2) + |I3|^2*(-XC3) + |I4|^2*(-XC4) + |I5|^2*(XL5 - XC5) + |I6|^2*(XL6 - XC6) = -0.565219
S := P + j*Q = 1.56046 - 0.565219i
# Записываем уравнения, описывающие цепь в матричном виде
# Z * I = B, где:  Z - квадратная матрица 6x6,
# B - матрица-столбец правых частей,
# I - матрица-столбец искомых токов.
Z := [
    -1, 1, 0, 0, 1, 0;
    0, -1, 1, 0, 0, 1;
    1, 0, -1, 1, 0, 0;
    0, Z2, 0, 0, -Z5, Z6;
    Z1, Z2, Z3, 0, 0, 0;
    0, 0, Z3, Z4, 0, -Z6
]
B := [0; 0; 0; 0; E3; E3]
# Вводим численные значения элементов матриц
Z = [
    -1, 1, 0, 0, 1, 0;
    0, -1, 1, 0, 0, 1;
    1, 0, -1, 1, 0, 0;
    0, 36i, 0, 0, -31 - 2i, 33 + 17i;
    61, 36i, 82 - 55i, 0, 0, 0;
    0, 0, 82 - 55i, 64 - 47i, 0, -33 - 17i
]
# Находим неизвестные токи, умножая обратную матрицу Z на матрицу B.
I := Z^-1*B
# Выводим численные значения найденных токов в виде вектора-столбца
I = [-0.0627247 + 0.0237696i; -0.059847 + 0.0347113i; -0.110484 + 0.00596218i; -0.0477591 - 0.0178075i; -0.00287771 - 0.0109416i; 0.0506368 + 0.0287491i]
# Записываем уравнения, описывающие цепь в матричном виде
# Z * I = B, где:  Z - квадратная матрица 6x6,
# B - матрица-столбец правых частей,
# I - матрица-столбец искомых токов.
Z := [Z1 + Z2 + Z3, Z2, Z3; Z2, Z2 + Z6 + Z5, -Z6; Z3, -Z6, Z3 + Z4 + Z6]
B := [E3; 0; E3]
# Находим неизвестные токи, умножая обратную матрицу Z на матрицу B.
J := Z^-1*B
# Выводим численные значения найденных токов в виде вектора-столбца
J = [-0.0627247 + 0.0237696i; 0.00287771 + 0.0109416i; -0.0477591 - 0.0178075i]
J1 := J[0]
J2 := J[1]
J3 := J[2]
I1 := J1 = -0.0627247 + 0.0237696i
I2 := J1 + J2 = -0.059847 + 0.0347113i
I3 := J1 + J3 = -0.110484 + 0.00596218i
I4 := J3 = -0.0477591 - 0.0178075i
I5 := -J2 = -0.00287771 - 0.0109416i
I6 := J2 - J3 = 0.0506368 + 0.0287491i
Y11 := 1/Z6 + 1/Z3 + 1/Z2
Y14 := -1/Z2
I11 := E3/Z3
Y22 := 1/Z1 + 1/Z3 + 1/Z4
Y12 := -1/Z3
I22 := -E3/Z3
Y44 := 1/Z1 + 1/Z2 + 1/Z5
Y24 := -1/Z1
I44 := 0
# Записываем уравнения, описывающие цепь в матричном виде
# Y * ϕ = I, где:  Y - квадратная матрица 3x3,
# I - матрица-столбец правых частей,
# ϕ - матрица-столбец искомых потенциалов.
Y := [Y11, Y12, Y14; Y12, Y22, Y24; Y14, Y24, Y44]
I := [I11; I22; I44]
Φ := Y^-1*I
Φ1 := Φ[0]
Φ = [-1.18228 - 1.80955i; 3.89353 - 1.105i; 0.0673256 + 0.344946i]
Φ2 := Φ[1]
Φ3 := 0
Φ4 := Φ[2]
I1N := (-Φ2 + Φ4)/Z1 = -0.0627247 + 0.0237696i
I2N := (-Φ4 + Φ1)/Z2 = -0.059847 + 0.0347113i
I3N := (-Φ1 + Φ2 - E3)/Z3 = 0.187921 + 0.0631613i
I4N := (Φ3 - Φ2)/Z4 = -0.0477591 - 0.0178075i
I5N := (Φ3 - Φ4)/Z5 = -0.00287771 - 0.0109416i
I6N := (Φ3 - Φ1)/Z6 = 0.0506368 + 0.0287491i
f1 := Φ[0] = -1.18228 - 1.80955i
f2 := Φ[1] = 3.89353 - 1.105i
f3 := 0
f4 := Φ[2]
f5 := f2 + I4*R4 = 0.836951 - 2.24468i
f7 := f1 - I6*R6 = -2.8533 - 2.75827i
f6 := f7 - I6*j*XL6 = -1.87583 - 4.47992i
f8 := f1 + I3*R3 = -10.242 - 1.32065i
f9 := f8 - I3*j*XC3 = -9.91404 + 4.75597i
f10 := f4 + I2*j*XL2 = -1.98064 - 3.18603i
f12 := f4 + I5*R5 = -0.0218833 + 0.00575541i
f11 := f12 + I5*j*XL5 = 0.229775 - 0.0604319i
F1 := f1
F2 := f2
F4 := f4
F5 := f5
F6 := f6
F7 := f7
F8 := f8
F9 := f9
F10 := f10
F11 := f11
F12 := f12
|F1| = 2.16154
arg(F1)/deg = -123.159
|F2| = 4.0473
arg(F2)/deg = -15.8442
|F4| = 0.351455
arg(F4)/deg = 78.956
|F5| = 2.39564
arg(F5)/deg = -69.5515
|F6| = 4.85679
arg(F6)/deg = -112.72
|F7| = 3.96854
arg(F7)/deg = -135.97
|F8| = 10.3268
arg(F8)/deg = -172.653
|F9| = 10.9958
arg(F9)/deg = 154.372
|F10| = 3.75149
arg(F10)/deg = -121.868
|F11| = 0.237589
arg(F11)/deg = -14.7354
|F12| = 0.0226275
arg(F12)/deg = 165.265
