table  # each column defines a variable
    U_1 (V) | U_2 (V) | U_3 (V) | U_4 (V) | U_5 (V) | U_6 (V) | U_7 (V)
    0.05 | 0.13 | 0.26 | 0.35 | 0.4 | 0.32 | 0.19
    0.24 | 0.48 | 0.78 | 0.87 | 0.87 | 0.54 | 0.3
    1.31 | 1.95 | 2.3 | 2.13 | 1.77 | 1.05 | 0.46
end table
table  # each column defines a variable
    λ_1 (m*10^-6) | λ_2 (m*10^-6) | λ_3 (m*10^-6) | λ_4 (m*10^-6) | λ_5 (m*10^-6) | λ_6 (m*10^-6) | λ_7 (m*10^-6)
    2.08 | 2.5 | 3.2 | 3.9 | 4.54 | 6.2 | 8.5
end table
i := 1 .. 7
# [plot: U_1 (V) vs λ_i (m*10^-6)]
